# 3) ПР KUKA KR 16-3 Приводы двухдвигательные с редукторами
125
# Количество звеньев (столько же степеней свободы):
N_ПР_1 := 6
5.5*3 = 16.5
125
# Массы звеньев:
9.2*3 = 27.6
9.2*3 - 5.5*3 = 11.1
125
# Звено 0 (основание ПР):
m_0_1 := 59  # кг
m_0_12 := 59.069*1.093748236*0.979494793971 = 63.2818
# Звено 1:
m_1_1 := 45.714  # кг
m_1ПР_1 := 70.9  # кг
# Двигатели плечевого звена и колонны
690/9 = 76.6667
m_1_12 := (28.307*1.5*1.093748236 - 29.2)*0.979494793971 = 16.8876
m_3ПР_1 := 39.86  # кг  # Двигатели локтевого звена
# Звено 2:
m_2_1 := 39.184  # кг
33500/441 = 75.9637
m_4ПР_1 := 13.8  # кг  # Двигатели кистевого и 5 звеньев (с редукторами)
m_2_12 := 21.864*1.5*1.093748236*0.979494793971 = 35.135
# Звено 3:
m_3_1 := 21.122  # кг
m_6ПР_1 := 4.84  # кг  # Двигатели кистевого 6 звена (с редукторами)
m_3_12 := (20.034*1.5*1.093748236 - 5)*0.979494793971 = 27.2968
# Звено 4:
111/4 = 27.75
m_4_1 := 11.755  # кг
# Массы приводов остальных звеньев включены в массы этих звеньев
L_z4ПР_1 := 0.116  # м
L_y4ПР_1 := 0.3  # м
m_4_12 := 3.584*1.5*1.093748236*0.979494793971 = 5.75942
# Звено 5:
m_5_1 := 5.225  # кг
L_y4ПР_2 := 0.402  # м
L_y6пр_1 := 0.089  # м
m_5_12 := 2.887*1.5*1.093748236*0.979494793971 = 4.63935
# Звено 6:
m_6_1 := 0.2  # кг
644 - 152 - 90/2 = 447
m_6_12 := 0.073*1.5*1.093748236*0.979494793971 = 0.11731
# Масса груза (рабочий инструмент ПР):
m_гр_1 := 16  # кг  # (максимальная грузоподъёмность ПР)
# Общая масса ПР KUKA KR16-3 грузоподъёмностью 16 кг вместе с грузом:
11.021*lb = 4.99904 kg
4.5 cm = 0.045 m
m_0_12 := 70142069.1432*1.30155389674e-6 = 91.2937
M_ПР_1 := m_0_1 + m_1ПР_1 + m_1_1 + m_3ПР_1 + m_2_1 + 3*m_4ПР_1 + m_3_1 + m_4_1 + m_5_1 + m_6_1 + m_гр_1 = 350.36
m_1_12 := 17502478.5382*1.30155389674e-6 = 22.7804
# Геометрические размеры звеньев:
M_ПР_1 = 350.36  # кг  # =251
m_2_12 := 13518762.9772*1.30155389674e-6 = 17.5954
117596792.20*mm^3
251 - m_3ПР_1 - 2*m_1ПР_1 - 3*m_4ПР_1 = 27.94
0.36*kg*cm^2 = 3.6e-5 kg*m^2
m_3_12 := 12387150.2952*1.30155389674e-6 = 16.1225
45176.34*mm^3
190.192*45176.34/117596792.20 = 0.0730647
m_4_12 := 2216090.01343*1.30155389674e-6 = 2.88436
570/4500 = 0.126667
m_5_12 := 1785246.45195*1.30155389674e-6 = 2.32359
m_0_12 := 113.442  # кг
m_6_12 := 45176.33798*1.30155389674e-6 = 0.0587994  # м
m_1_12 := 28.307  # кг
L_y0m1_1 := 0.152  # м
L_y0m2_1 := 0.1595  # м
L_y0m3_1 := 0.133  # м
4500/75.964 = 59.2386
4500*0.127 = 571.5
m_2_12 := 21.864  # кг
L_z0m1_1 := 0.0575766375  # м
L_z0m2_1 := 0.035  # м
L_z0m3_1 := 0.12745139635  # м
m_0_12 := 54.255
m_1_12 := 40.6916
m_3_12 := 20.034  # кг
m_4_12 := 3.584*1.5*1.093748236*0.979494793971 = 5.75942
m_2_12 := 24.868
m_4_12 := 3.584  # кг
m_5_12 := 2.887*1.5*1.093748236*0.979494793971 = 4.63935
m_5_12 := 2.887  # кг
m_6_12 := 0.073*1.5*1.093748236*0.979494793971 = 0.11731
2*π*M*4100/60 == 570 solve, M → 171/(41*π) = 1.32759
m_3_12 := 22.787
m_6_12 := 0.073  # м  # кг
m_4_12 := 5.759
L_m1_y := 0.11  # м
L_z0_1 := 0.39  # м
5.823*125 = 727.875
1.69*10^-4 = 169*10^-6
m_5_12 := 4.639
L_m1_z := 0.15  # м
м
L_z1_1 := 0.285  # м
L_y1_1 := 0.26  # м
m_6_12 := 0.117
L_z2_1 := 0.715  # м
9.8*kg*cm^2 = 980*10^-6
L_z3_1 := 0.035  # м
L_y3_1 := 0.26  # м
L_m2_z := 0.32  # м
L_m5_y := 0.05  # м
L_m3_y := 0.12  # м
L_m6_y := 0.053  # м
L_y4_1 := 0.18  # м
L_m3_z := 0.02  # м
L_y5_1 := 0.15  # м
28*10^3*N*m/rad = 8.14487 N*N*m/arcmin
L_m4_y := 0.1  # м
L_y6_1 := 0.01  # м
40.6916
m_0_12 := 54.255*0.976 = 52.9529  # a
1452*N*m/arcmin = 4991608 N*m/rad
m_1_12 := 40.6916*0.976 = 39.715  # b
4/3*x == y
x + y == m_0_12 + m_1_12
solve, x, y → [92.6678816, 0]
m_2_12 := 24.868*0.976 = 24.2712  # c
91.294/22.78 = 4.00764
m_3_12 := 22.787*0.976 = 22.2401  # d
1*hp = 745.7 W
91.294 == y*2 solve → 45.647
m_0_12 + m_1_12 == x + 4/3*x solve, x → 39.7148064
570*W = 0.764383 hp
m_4_12 := 5.759*0.976 = 5.62078
c/b := 2.5  # error: Здесь необходимо указать имя.
0.999999244796*1.09374906203 = 1.09375
m_0_12 + m_1_12 - 40.6915714286 = 51.9763
m_5_12 := 4.639*0.976 = 4.52766
a + b + c + d := 251 - (2*m_1ПР_1 + m_3ПР_1 + 3*m_4ПР_1 + m_4_12 + m_5_12 + m_гр_1)  # error: Здесь необходимо указать имя.
м
54.255
m_6_12 := 0.117*0.976 = 0.114192
M_роб := m_0_12 + 2*m_1ПР_1 + m_1_12 + m_3ПР_1 + m_2_12 + 2*m_4ПР_1 + m_6ПР_1 + m_3_12 + m_4_12 + m_5_12 + m_6_12 = 363.542
g := 9.807
# Требуется определить максимальный момент, развиваемый приводом 5-го звена.
# Для этого составим уравнения для расчёта силы инерции, действующей на груз, при максимальной угловой скорости звена 5.
# Максимальная угловая скорость, развиваемая 5-м звеном:
ω_5_2_grad_1 := 300  # °/с  # (из технической документации робота)
# 1 радиан в секунду [рад/с] = 57.2957795130824 градус в секунду [°/с]
251 - (2*m_1ПР_1 + m_3ПР_1 + 3*m_4ПР_1 + m_4_12 + m_5_12 + m_гр_1) == b/1.5 + b + 17.595/16.123*b/2.5 + b/2.5
2.5 == b/d
b/a == 1.5
c/d == 17.595/16.123 solve, a →  # error: Решение не было найдено.
ω_5_2_rad_1 := ω_5_2_grad_1/57.2957795131 = 5.23599  # рад/с
b/a := 1.5  # error: Здесь необходимо указать имя.
c/d := 17.595/16.123  # error: Здесь необходимо указать имя.
V_5max_1 := ω_5_2_rad_1*L_y5_1 = 0.785398  # м/c
ω_5_1 := V_5max_1/L_y5_1 = 5.23599  # c^-1
# tr5_1 - время разгона до максимальной скорости, возьмём равным
t_r5_1 := 0.15  # с
b/1.5 + b + 17.595/16.123*b/2.5 + b/2.5 == 251 - (2*m_1ПР_1 + m_3ПР_1 + 3*m_4ПР_1 + m_4_12 + m_5_12 + m_гр_1) solve, b → 0.715708722313
ε_5_1 := V_5max_1/(L_y5_1*t_r5_1) = 34.9066  # c^-2
56.9682014361 = 56.9682
η_5_1 := 0.96
b
# Считаем, что силы приложены в центре масс звена, рабочего органа и объекта манипулирования.Статический момент имеет максимальное значение при выполнении условия:
a
56.9682014361/1.5 = 37.9788
M_5ст_1 := g*(L_m5_y*m_5_12 + m_6_12*(L_y5_1 + L_m6_y) + m_гр_1*(L_y5_1 + L_y6_1) + m_6ПР_1*(L_y5_1 - L_y6пр_1/2)) = 32.561  # c
17.595/16.123*56.9682014361/2.5 = 24.8677
# Для вычисления динамического момента, действующего на "локтевое" звено, находим эквивалентный момент инерции этого звена.
d
56.9682014361/2.5 = 22.7873
I_5экв_1 := L_m5_y^2*m_5_12 + m_6_12*(L_y5_1 + L_m6_y)^2 + m_гр_1*(L_y5_1 + L_y6_1)^2 + m_6ПР_1*(L_y5_1 - L_y6пр_1/2)^2 = 0.479495
50*rpm*92*N*m = 481.711 W
M_5дин_1 := I_5экв_1*ε_5_1 = 16.7375  # Н*м
89 mm = 0.089 m
M_5_1 := 1/η_5_1*(M_5ст_1 + M_5дин_1) = 51.3527  # Н*м
P_5_max_1 := M_5_1*ω_5_1 = 268.882  # Вт
P_5_1 := 2.5*P_5_max_1 = 672.205  # Вт
# Требуется определить максимальный момент, развиваемый приводом 3-го звена.
# Для этого составим уравнения для расчёта силы инерции, действующей на груз, при максимальной угловой скорости звена 3 и при "вытянутом положении робота".
3.57 + 14.2 = 17.77
# Максимальная угловая скорость, развиваемая 3-м звеном:
5.01 + 8.78 = 13.79
ω_3_2_grad_1 := 156  # °/с  # (из технической документации робота)
# 1 радиан в секунду [рад/с] = 57.2957795130824 градус в секунду [°/с]
ω_3_2_rad_1 := ω_3_2_grad_1/57.2957795131 = 2.72271  # рад/с
V_3max_1 := ω_3_2_rad_1*sqrt(L_y3_1^2 + L_z3_1^2) = 0.714291  # м/c
L_m1_y := 0.11  # м
L_z0_1 := 0.39  # м
m_6ПР_1*(L_y5_1 - L_y6пр_1/2)
ω_3_1 := V_3max_1/sqrt(L_y3_1^2 + L_z3_1^2) = 2.72271  # c^-1
L_m1_z := 0.15  # м
L_z1_1 := 0.285  # м
L_y1_1 := 0.26  # м
# tr3_1 - время разгона до максимальной скорости, возьмём равным
L_y0m1_1 = 0.152
L_z2_1 := 0.715  # м
L_z3_1 := 0.035  # м
L_y3_1 := 0.26  # м
L_m2_z := 0.32  # м
L_m5_y := 0.05  # м
t_r3_1 := 0.25  # с
L_y0m2_1 = 0.1595
L_y6пр_1 := 0.089
L_m3_y := 0.12  # м
L_m6_y := 0.053  # м
L_y4_1 := 0.18  # м
ε_3_1 := V_3max_1/(sqrt(L_y3_1^2 + L_z3_1^2)*t_r3_1) = 10.8909  # c^-2
L_m3_z := 0.02  # м
L_y5_1 := 0.15  # м
-g*(m_4ПР_1*L_y0m1_1*cos(π/2 - atan2(L_y3_1 + L_y4_1, L_z3_1) - atan2(L_z3_1, L_y3_1)) + m_4ПР_1*L_y0m2_1*cos(π/2 - atan2(L_y3_1 + L_y4_1, L_z3_1) - atan2(L_z3_1, L_y3_1)) + m_4ПР_1*L_y0m3_1*cos(π/2 - atan2(L_y3_1 + L_y4_1, L_z3_1) - atan2(L_z3_1, L_y3_1))) = -60.068
L_m4_y := 0.1  # м
η_3_1 := 0.96
L_y6_1 := 0.01  # м
40.6916
# Считаем, что силы приложены в центре масс звена, рабочего органа и объекта манипулирования.Статический момент имеет максимальное значение при выполнении условия:
-g*(m_4ПР_1*L_y0m1_1 + m_4ПР_1*L_y0m2_1 + m_4ПР_1*L_y0m3_1) = -60.1571
M_3ст_1 := g*(m_3_12*L_m3_y + m_4ПР_1*L_y4ПР_2 + m_4_12*(L_y3_1 + L_m4_y) + m_4ПР_1*(L_y3_1 + L_y4_1) + m_5_12*(L_y3_1 + L_y4_1 + L_m5_y) + m_6ПР_1*(L_y3_1 + L_y4_1 + L_y5_1 - L_y6пр_1/2) + m_6_12*(L_y3_1 + L_y4_1 + L_y5_1 + L_m6_y) + m_гр_1*(L_y3_1 + L_y4_1 + L_y5_1 + L_y6_1)) = 302.488
# Для вычисления динамического момента, действующего на "локтевое" звено, находим эквивалентный момент инерции этого звена.
I_3экв_1 := m_3_12*L_m3_y^2 + m_4ПР_1*L_y4ПР_2^2 + m_4_12*(L_y3_1 + L_m4_y)^2 + m_4ПР_1*(L_y3_1 + L_y4_1)^2 + m_5_12*(L_y3_1 + L_y4_1 + L_m5_y)^2 + m_6ПР_1*(L_y3_1 + L_y4_1 + L_y5_1 - L_y6пр_1/2)^2 + m_6_12*(L_y3_1 + L_y4_1 + L_y5_1 + L_m6_y)^2 + m_гр_1*(L_y3_1 + L_y4_1 + L_y5_1 + L_y6_1)^2 = 14.2851
M_3дин_1 := I_3экв_1*ε_3_1 = 155.577  # Н*м
M_3_1 := 1/η_3_1*(M_3ст_1 + M_3дин_1) = 477.151  # Н*м
P_3_max_1 := M_3_1*ω_3_1 = 1299.14  # Вт
P_3_1 := 2.5*P_3_max_1 = 3247.86  # Вт
0.605*kg*cm^2 = 6.05e-5 kg*m^2
# Требуется определить максимальный момент, развиваемый приводом 2-го звена.
# Для этого составим уравнения для расчёта силы инерции, действующей на груз, при максимальной угловой скорости звена 3 и при "вытянутом положении робота".
# Максимальная угловая скорость, развиваемая 3-м звеном:
ω_2_2_grad_1 := 156  # °/с  # (из технической документации робота)
# 1 радиан в секунду [рад/с] = 57.2957795130824 градус в секунду [°/с]
ω_2_2_rad_1 := ω_2_2_grad_1/57.2957795131 = 2.72271  # рад/с
V_2max_1 := ω_2_2_rad_1*L_z2_1 = 1.94674  # м/c
ω_2_1 := V_2max_1/L_z2_1 = 2.72271  # c^-1
# tr2_1 - время разгона до максимальной скорости, возьмём равным
t_r2_1 := 1  # с
ε_2_1 := V_2max_1/(L_z2_1*t_r2_1) = 2.72271  # c^-2
g*(m_3_12*L_m3_y + m_4ПР_1*L_y4ПР_2 + m_4_12*(L_y3_1 + L_m4_y) + m_4ПР_1*(L_y3_1 + L_y4_1) + m_5_12*(L_y3_1 + L_y4_1 + L_m5_y) + m_6ПР_1*(L_y3_1 + L_y4_1 + L_y5_1 - L_y6пр_1/2) + m_6_12*(L_y3_1 + L_y4_1 + L_y5_1 + L_m6_y) + m_гр_1*(L_y3_1 + L_y4_1 + L_y5_1 + L_y6_1))
η_2_1 := 0.96
# Считаем, что силы приложены в центре масс звена, рабочего органа и объекта манипулирования.Статический момент имеет максимальное значение при выполнении условия:
M_2ст_1 := g*m_3ПР_1*L_z2_1 + g*m_2_12*L_m2_z + g*(m_3_12*(L_z2_1 + L_m3_y) + m_4ПР_1*(L_z2_1 + L_y4ПР_2) + m_4_12*(L_z2_1 + L_y3_1 + L_m4_y) + m_4ПР_1*(L_z2_1 + L_y3_1 + L_y4_1) + m_5_12*(L_z2_1 + L_y3_1 + L_y4_1 + L_m5_y) + m_6ПР_1*(L_z2_1 + L_y3_1 + L_y4_1 + L_y5_1 - L_y6пр_1/2) + m_6_12*(L_z2_1 + L_y3_1 + L_y4_1 + L_y5_1 + L_m6_y) + m_гр_1*(L_z2_1 + L_y3_1 + L_y4_1 + L_y5_1 + L_y6_1)) = 1225.73
# Для вычисления динамического момента, действующего на "локтевое" звено, находим эквивалентный момент инерции этого звена.
I_2экв_1 := I_3экв_1 + (m_4_12 + m_3_12 + 2*m_4ПР_1 + m_6ПР_1 + m_5_12 + m_6_12 + m_гр_1)*L_z2_1^2 + m_2_12*L_m2_z^2 + m_3ПР_1*L_z2_1^2 = 78.5278
M_2дин_1 := I_2экв_1*ε_2_1 = 213.809  # Н*м
M_2_1 := 1/η_2_1*(M_2ст_1 + M_2дин_1) = 1499.52  # Н*м
P_2_max_1 := M_2_1*ω_2_1 = 4082.75  # Вт
P_2_1 := 2.5*P_2_max_1 = 10206.9  # Вт
M_2ст_1 = 1225.73
M_роб = 363.542  # кг
M_2ст_122 := g*m_2_12*L_m2_z + g*m_3_12*(L_z2_1 + L_m3_y) + g*m_4_12*(L_z2_1 + L_y3_1 + L_m4_y) + g*m_5_12*(L_z2_1 + L_y3_1 + L_y4_1 + L_m5_y) + g*m_6_12*(L_z2_1 + L_y3_1 + L_y4_1 + L_y5_1 + L_m6_y) + g*m_гр_1*(L_z2_1 + L_y3_1 + L_y4_1 + L_y5_1 + L_y6_1) + (g*m_3ПР_1*L_z2_1 + m_4ПР_1*g*(L_z2_1 - L_y0m1_1) + g*m_4ПР_1*(L_z2_1 - L_y0m2_1) + g*m_4ПР_1*(L_z2_1 - L_y0m3_1)) = 1088.55
# Требуется определить максимальный момент, развиваемый приводом поворота колонны.
# Для этого составим уравнения для расчёта силы инерции, действующей на груз, при максимальной угловой скорости звена 1 и при "вытянутом положении робота".
# Максимальная угловая скорость, развиваемая 1-м звеном:
ω_1_2_grad_1 := 156  # °/с  # (из технической документации робота)
# 1 радиан в секунду [рад/с] = 57.2957795130824 градус в секунду [°/с]
ω_1_2_rad_1 := ω_1_2_grad_1/57.2957795131 = 2.72271  # рад/с
V_1max_1 := ω_1_2_rad_1*L_y1_1 = 0.707906  # м/c
ω_1_1 := V_1max_1/L_y1_1 = 2.72271  # c^-1
# tr1_1 - время разгона до максимальной скорости, возьмём равным
t_r1_1 := 2  # с
ε_1_1 := V_1max_1/(L_y1_1*t_r1_1) = 1.36136  # c^-2
η_1_1 := 0.96
# Считаем, что силы приложены в центре масс звена, рабочего органа и объекта манипулирования.Статический момент имеет максимальное значение при выполнении условия:
M_1ст_1 := 0
# Для вычисления динамического момента, действующего на "локтевое" звено, находим эквивалентный момент инерции этого звена.
I_1экв_1 := m_1_12*L_m1_y^2 + 2*m_1ПР_1*L_y1_1^2 + m_2_12*(L_m2_z + L_y1_1)^2 + 2*m_3ПР_1*(L_y1_1 + L_z2_1)^2 + m_3_12*(L_y1_1 + L_z2_1 + L_m3_y)^2 + m_4_12*(L_y1_1 + L_z2_1 + L_y3_1 + L_m4_y)^2 + m_5_12*(L_y1_1 + L_z2_1 + L_y3_1 + L_y4_1 + L_m5_y)^2 + m_6_12*(L_y1_1 + L_z2_1 + L_y3_1 + L_y4_1 + L_y5_1 + L_m5_y)^2 + m_гр_1*(L_y1_1 + L_z2_1 + L_y3_1 + L_y4_1 + L_y5_1 + L_y6_1)^2 + 2*m_4ПР_1*(L_y1_1 + L_z2_1 + L_y4ПР_1) + 2*m_4ПР_1*(L_y1_1 + L_z2_1 - L_y4ПР_1) + 2*m_4ПР_1*(L_y1_1 + L_z2_1 - L_y4ПР_2) = 250.039
M_1дин_1 := I_1экв_1*ε_1_1 = 340.392  # Н*м
M_1_1 := 1/η_1_1*(M_1ст_1 + M_1дин_1) = 354.575  # Н*м
P_1_max_1 := M_1_1*ω_1_1 = 965.406  # Вт
P_1_1 := 2.5*P_1_max_1 = 2413.52  # Вт
